OpenVSP model (file version 5), 4 components.
Geometry view with OpenVSP parameter names; values to 6 digits, angles in degrees, lengths in the model's unit.
Overall bounding box: X_Min=-8.85246 X_Len=17.8691 Y_Min=-9.53713 Y_Len=18.4185 Z_Min=-1.35138 Z_Len=4.14323

Fuselage "FuselageGeom"
  location (X Y Z) -8.85246 -0.327869 0, rotation 0 0 0
  bounding box size 16.3929 2.38454 2.40928
  Design: Length=16.3929
  cross sections:
    n  CurveBasis  XLocPercent  YLocPercent  ZLocPercent  shape
    0  0           0            0            -0.0245902   point
    1  0           0.206967     0            -0.0327869   circle Circle_Diameter=1.58908
    2  0           0.215374     0            -0.0325181   circle Circle_Diameter=1.63663
    3  0           0.300826     0            -0.00819672  circle Circle_Diameter=2.38454
    4  0           0.525413     0            -0.00819672  as above
    5  0           0.637707     0            -0.00819672  as above
    6  0           0.818853     0            0.00406477   circle Circle_Diameter=1.46535
    7  0           0.909427     0            0.0102124    circle Circle_Diameter=0.875217
    8  0           0.954713     0            0.00510622   circle Circle_Diameter=0.581118
    9  0           1            0            0            point

Wing "WingGeom", child of "FuselageGeom"
  location (X Y Z) -2.78689 0 -1.06557, rotation 0 0 0
  symmetric about XZ
  bounding box size 2.44444 18.4185 1.30422
  totals: TotalSpan=17.8581 TotalProjectedSpan=17.7483 TotalChord=1.87698 TotalArea=33.5193 TotalAR=9.3976 MAC=1.93417
  root: chord 2.44444, twist 0, NACA 4-series Camber=0 CamberLoc=0.2 ThickChord=0.203571
  sections:
    n  Span     Root_Chord  Tip_Chord  Area     Sweep    Sweep_Location  Dihedral  Twist  Twist_Location  tip airfoil
    1  8.92904  2.44444     1.30952    16.7597  2.55357  0               6.35714   0      0.25            NACA 4-series Camber=0 CamberLoc=0.2 ThickChord=0.1

Wing "WingGeom", child of "WingGeom"
  location (X Y Z) 6.80328 -0.327869 2.62295, rotation 0 0 0
  symmetric about XZ
  bounding box size 1.4321 6.31375 0.337796
  totals: TotalSpan=6.31375 TotalProjectedSpan=6.31375 TotalChord=1.23216 TotalArea=7.77954 TotalAR=5.12413 MAC=1.24297
  root: chord 1.4321, twist 0, NACA 4-series Camber=0 CamberLoc=0.2 ThickChord=0.235714
  sections:
    n  Span     Root_Chord  Tip_Chord  Area     Sweep    Sweep_Location  Dihedral  Twist  Twist_Location  tip airfoil
    1  3.15687  1.4321      1.03222    3.88977  4.48214  0               0         0      0.25            NACA 4-series Camber=0 CamberLoc=0.2 ThickChord=0.0714286

Wing "WingGeom", child of "FuselageGeom"
  location (X Y Z) -3.52459 -0.327869 0, rotation 90 0 0
  symmetric about XZ
  bounding box size 12.5412 0.445403 2.7123
  totals: TotalSpan=5.4246 TotalProjectedSpan=5.4246 TotalChord=4.47024 TotalArea=27.807 TotalAR=1.05823 MAC=6.96895
  root: chord 11.3333, twist 0, NACA 4-series Camber=0 CamberLoc=0.2 ThickChord=0.0392857
  sections:
    n  Span      Root_Chord  Tip_Chord  Area     Sweep    Sweep_Location  Dihedral  Twist  Twist_Location  tip airfoil
    1  1.73413   11.3333     2.31349    11.8327  80       0               0         0      0.25            NACA 4-series Camber=0 CamberLoc=0.2 ThickChord=0.121429
    2  0.978175  2.31349     1.92063    2.07086  38.7786  0               0         0      0.25            NACA 4-series Camber=0 CamberLoc=0.2 ThickChord=0.139286
